# Dry MIL-53 pressure loading-unloading cycle.
# Run from this directory so the structure file is found.
# ---------- 初始化与结构选择 ----------
variable	T	index 0

log 		${T}.log.txt
units           real
atom_style      full
boundary        p p p

# ---------- 力场设置 ----------
pair_style      lj/cut 12.0
bond_style      harmonic
angle_style     cosine/periodic
dihedral_style  harmonic
improper_style  fourier

special_bonds   lj/coul 0.0 0.0 1.0
pair_modify     tail yes mix arithmetic
dielectric      1.0
box tilt        large
read_data       data.water${T}


# ---------- 原子分组与时间步长 ----------
variable	DT	equal	0.5
timestep	${DT}
variable	tdamp	equal   ${DT}*100
variable	pdamp	equal   ${DT}*1000


# ---------- 初始准备（最小化命令当前未启用） ----------
min_style       cg
#minimize        1.0e-4  1.0e-8  10000   10000
reset_timestep 0


velocity all create 300 123456


# ---------- 热力学信息与轨迹输出 ----------
thermo_style  custom step temp etotal  press pxx pyy pzz vol
thermo 10000
dump 1 all custom 10000 ${T}.final.lammpstrj  id type x y z


# ---------- NPT 平衡阶段 ----------
fix NPT all npt temp 300 300 ${tdamp} aniso 0 0 ${pdamp}
run 1000000
unfix NPT
undump 1
reset_timestep 0

# ---------- 加载卸载过程的数据输出 ----------
variable p0 equal "press"
variable v0 equal "vol"
fix 1 all ave/time 20 100 20000 v_p0 v_v0 file ${T}.p-v.txt

dump 2 all custom 20000 ${T}.all1.xyz id type x y z


# ---------- 压力加载阶段 ----------
fix NPT2 all npt temp 300 300 ${tdamp} aniso 0 20000 ${pdamp}
run 2000000
unfix NPT2

# ---------- 压力卸载阶段 ----------
fix NPT3 all npt temp 300 300 ${tdamp} aniso 20000 0 ${pdamp}
run 2000000
unfix NPT3
